# Генерация выборки объема 50 из распределения T_3.
ORIGIN := 1
N := 70
x := rt(N, 3)
# 1. Выборочные моменты и центральные выборочные моменты до 3-го порядка включительно
# Выборочный момент порядка k | Выборочный центральный момент порядка k
a(k) := 1/N*sum(x[i]^k, i = 1 .. N)
k := 1 .. 3
a0(k) := 1/N*sum((x[i] - a(1))^k, i = 1 .. N)
a(k) = [-0.0794085; 1.57932; -1.23842]
a0(k) = [0; 1.57302; -0.863187]
# 2. Графики эмпирической и теоретической функций распределения.
# Изменение объёма выборки с N до 2N, 3N, с целью выявить стремление эмпирической функции распределения к теоритической функции распределения
# Теоретическая функция плотности (распр. Стьютенда)
f(x, n) := Γ((n + 1)/2)/(sqrt(n*π)*Γ(n/2)*(1 + x^2/n)^((n + 1)/2))
# Теоретическая функция распределения
F(x, n) := integral(f(t, n), t = -∞ .. x)
# Вариационный ряд C на основе выборки x
C1 := sort(x)
i := 1 .. N
# Выборка объёмом 2N
N2 := N*2
x2 := rt(N2, 3)
b := 1 .. N2
C2 := sort(x2)
# Выборка объёмом 3N
N3 := N*3
x3 := rt(N3, 3)
l := 1 .. N3
C3 := sort(x3)
# Эмпирическая функция распределения для выборок объёма N, 2N и 3N:
F_emp(x, y) :=
    0 if y ≤ min(x)
    length(Match(y, x, "lt"))/length(x) if min(x) < y ≤ max(x)
    1 if y > max(x)
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# При последовательном увеличении объёма выборки, на последних итерациях
# прослеживается тенденция стремления эмпирической функции распределения
# к теоретической функции распределения, следовательно, соответствующая теорема,
# обозначающая это, верна: Fn(y) --P--> F(y), при n -> ∞
# 3. Гистограмма и теоретическая плотность распределения.
N := 50
x := rt(N, 3)
# Число столбцов в гистограмме
k := 30
# Границы области значений случайной величины, вычисление длины интервалов группировки.
lower_bound := floor(min(x))
upper_bound := ceil(max(x))
d := (upper_bound - lower_bound)/k
# Вспомогательный вектор границ группировок
j := 1 .. k + 1
# Вектор концов интервалов группировки.
V[j] := lower_bound + (upper_bound - lower_bound)/k*j
# Логическая функция, показывающая, принадлежит ли значение y промежутку [V_i;V_(i+1))
I(i, y) := y < V[i + 1] and y ≥ V[i]
# Вспомогательный вектор со значениями из диапазона [0, k] (k - кол-во столбцов)
j := 1 .. k
# Высота прямоугольника, построенного над j-м интервалом группировки.
h[j] := sum(I(j, x[i])/(N*d), i = 1 .. N)
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# Оценка приближения теоретической плотности к контуру гистограммы
N := 2500
k := 100
x := rt(N, 3)
lower_bound := floor(min(x))
upper_bound := ceil(max(x))
d := (upper_bound - lower_bound)/k
j := 1 .. k + 1
V[j] := lower_bound + (upper_bound - lower_bound)/k*j
I(i, y) := y < V[i + 1] and y ≥ V[i]
j := 1 .. k
h[j] := sum(I(j, x[i])/(N*d), i = 1 .. N)
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# По данной оценке приближения контура гистограммы к точкам графика плотности вероятности
# распределения Стьюдента наглядно видно, что теорема, гласящая о том, что при неограниченном увеличении числа интервалов группировки имеет место сходимость по вероятности гистограммы к плотности распределения.
